<?xml version="1.0"?>
<propeller name="FlyingTrainerOneFixedPitchPropeller">
  <ixx>1.67</ixx>
  <diameter unit="IN">75.0</diameter>
  <numblades>2</numblades>
  <minpitch>22.0</minpitch>
  <maxpitch>22.0</maxpitch>

  <table name="C_THRUST" type="internal">
    <tableData>
      0.0   0.073
      0.1   0.073
      0.2   0.072
      0.3   0.071
      0.4   0.069
      0.5   0.066
      0.6   0.062
      0.7   0.055
      0.8   0.045
      0.9   0.034
      1.0   0.030
      1.1   0.026
      1.2   0.023
      1.3   0.020
      1.4   0.017
      1.5   0.015
      1.6   0.013
      1.7   0.011
      1.8   0.009
      1.9   0.007
      2.0   0.005
      2.1   0.003
      2.2   0.001
      2.3  -0.001
      5.0  -0.006
    </tableData>
  </table>

  <table name="C_POWER" type="internal">
    <tableData>
      0.0   0.0660
      0.1   0.0700
      0.2   0.0700
      0.3   0.0660
      0.4   0.0600
      0.5   0.0530
      0.6   0.0501
      0.7   0.0469
      0.8   0.0426
      0.9   0.0360
      1.0   0.0282
      1.1   0.0191
      1.2   0.0155
      1.3   0.0191
      1.4   0.0282
      1.5   0.0360
      1.6   0.0426
      1.7   0.0469
      1.8   0.0501
      1.9   0.0516
      2.0   0.0525
      2.1   0.0525
      2.2   0.0522
      2.3   0.0511
      2.4   0.0504
      5.0   0.0493
    </tableData>
  </table>

  <table name="CT_MACH" type="internal">
    <tableData>
      0.85  1.0
      1.05  0.8
    </tableData>
  </table>

  <table name="CP_MACH" type="internal">
    <tableData>
      0.85  1.0
      1.05  1.8
      2.00  1.4
    </tableData>
  </table>
</propeller>
